*Heading
** Job name: Job-1 Model name: Model-1
** Generated by: Abaqus/CAE 2017
*Preprint, echo=NO, model=NO, history=NO, contact=NO
**
** PARTS
**
*Part, name=Part-1
*Node
      1,         100.,         100.,          40.
      2,         100.,          95.,          40.
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*Element, type=C3D8
   1,  190,  191,  212,  211,    1,    2,   23,   22
   2,  191,  192,  213,  212,    2,    3,   24,   23
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*Nset, nset=Set-1, generate
    1,  3969,     1
*Elset, elset=Set-1, generate
    1,  3200,     1
** Section: Section-1
*Solid Section, elset=Set-1, material=MAT1
,
*End Part
**
**
** ASSEMBLY
**
*Assembly, name=Assembly
**
*Instance, name=Part-1-1, part=Part-1
*End Instance
**
*Nset, nset=Set-1, instance=Part-1-1, generate
    1,  3969,     1
*Elset, elset=Set-1, instance=Part-1-1, generate
    1,  3200,     1
*Nset, nset=Set-2, instance=Part-1-1
  169,  170,  171,  172,  173,  174
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*Elset, elset=Set-2, instance=Part-1-1
  141,  142,  143,  144,  145,  146
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*Nset, nset=Set-3, instance=Part-1-1
    1,    2,    3,    4,    5,    6
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*Elset, elset=Set-3, instance=Part-1-1
    1,    2,    3,    4,    5,    6
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*Nset, nset=Set-4, instance=Part-1-1, generate
    1,  3969,     1
*Elset, elset=Set-4, instance=Part-1-1, generate
    1,  3200,     1
*Nset, nset=Set-5, instance=Part-1-1, generate
    1,  3969,     1
*Elset, elset=Set-5, instance=Part-1-1, generate
    1,  3200,     1
*Nset, nset=Set-6, instance=Part-1-1, generate
    1,  3969,     1
*Elset, elset=Set-6, instance=Part-1-1, generate
    1,  3200,     1
*Elset, elset=_Surf-1_S3, internal, instance=Part-1-1
    1,    2,    3,    4,    5,    6
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*Surface, type=ELEMENT, name=Surf-1
_Surf-1_S3, S3
*End Assembly
**
** MATERIALS
**
*Material, name=MAT1
*Density
2.,
*Depvar
      1,
*Elastic, dependencies=1
    1.,   0.3, ,    1.
 1e+19,   0.3, , 1e+19
*User Defined Field
*Mohr Coulomb
38.,8.
*Mohr Coulomb Hardening
 0.1,0.
** ----------------------------------------------------------------
**
** STEP: Step-1
**
*Step, name=Step-1, nlgeom=NO
*Geostatic, utol
0.1, 1., 1e-05, 1.
**
** BOUNDARY CONDITIONS
**
** Name: BC-1 Type: Displacement/Rotation
*Boundary
Set-2, 1, 1
Set-2, 2, 2
Set-2, 3, 3
** Name: BC-2 Type: Displacement/Rotation
*Boundary
Set-3, 1, 1
Set-3, 2, 2
**
** LOADS
**
** Name: Load-2   Type: Body force
*Dload
Set-6, BZ, -20.
**
** OUTPUT REQUESTS
**
*Restart, write, frequency=0
**
** FIELD OUTPUT: F-Output-1
**
*Output, field
*Node Output
U,
*Element Output, directions=YES
E, FV, S, SDV
*Output, history, frequency=0
*End Step
** ----------------------------------------------------------------
**
** STEP: Step-2
**
*Step, name=Step-2, nlgeom=NO
*Static
1., 1., 1e-05, 1.
**
** LOADS
**
** Name: Load-3   Type: Pressure
*Dsload
Surf-1, P, 50.
**
** OUTPUT REQUESTS
**
*Restart, write, frequency=0
**
** FIELD OUTPUT: F-Output-1
**
*Output, field
*Node Output
U,
*Element Output, directions=YES
E, FV, S, SDV
*Output, history, frequency=0
*End Step
